units metal
atom_style molecular
boundary s s s    #non-periodic

# System definition
read_data Hydrocarbon_Bearing.data

# set groups
group free type 1 2
group anchor type  3 4
group roty type   5 6

# Pair Coefficients
pair_style	airebo 3.0 1 0
pair_coeff * * CH.airebo C H C H C H

#freeze the anchor
fix anchorfix anchor setforce 0.0 0.0 0.0 #first is ID = user-assigned name for the fix,  ID of the group of atoms
velocity anchor set 0.0 0.0 0.0

#Minimize before bringing to temperature and running motors

minimize 1.0e-4 1.0e-6 1000 10000
write_restart Energy_min_hydrocarbon_bearing.init.restart
