units metal
atom_style molecular
boundary s s s    #non-periodic

# System definition
read_restart step_1_ringout.init.restart

# set groups
group free type 1 2
group pinanchor type  3 4
group posy type  5 6
group center type  7 8
group base type 9 10 #keep it anchored

# Pair Coefficients
pair_style	airebo 3.0 1 0
pair_coeff * * CH.airebo C H C H C H C H C H

#freeze the pin anchor atoms atoms atoms
fix anchorfix pinanchor setforce 0.0 0.0 0.0 #first is ID = user-assigned name for the fix,  ID of the group of atoms
velocity pinanchor set 0.0 0.0 0.0

#freeze the pin anchor atoms atoms atoms
fix basefix base setforce 0.0 0.0 0.0 #first is ID = user-assigned name for the fix,  ID of the group of atoms
velocity base set 0.0 0.0 0.0

# Equilibrate to 90K
fix nve all nve
timestep 0.00025
fix freefix free temp/berendsen 90. 90. 0.25

#move gripper parts 10 angstrom in negative Y

fix center_down center move linear 0.0 -1.00 0.00
fix posy_down posy move linear 0.0 -1.00 0.00
dump down_wait all custom 800 step2_down.lammpstrj id type x y z vx vy vz

thermo 500
run 40000

write_restart step_2_down.init.restart
