units metal
atom_style molecular
boundary s s s    #non-periodic

# System definition
read_restart step_3_wait.init.restart

# set groups
group free type 1 2
group pinanchor type  3 4
group posy type  5 6
group center type  7 8
group base type 9 10

# Pair Coefficients
pair_style	airebo 3.0 1 0
pair_coeff * * CH.airebo C H C H C H C H C H

#freeze the pin anchor atoms atoms atoms
fix anchorfix pinanchor setforce 0.0 0.0 0.0 #first is ID = user-assigned name for the fix,  ID of the group of atoms
velocity pinanchor set 0.0 0.0 0.0

#freeze the center atoms
fix centerfix center setforce 0.0 0.0 0.0 #first is ID = user-assigned name for the fix,  ID of the group of atoms
velocity center set 0.0 0.0 0.0

#freeze the center atoms
fix basefix base setforce 0.0 0.0 0.0 #first is ID = user-assigned name for the fix,  ID of the group of atoms
velocity base set 0.0 0.0 0.0


# Equilibrate to 90K
fix nve all nve
timestep 0.00025
fix freefix free temp/berendsen 90. 90. 0.25

#move rods only 0.8 angstrom in negative Y

fix posy_down posy move linear 0.0 -0.50 0.00
dump down_grab all custom 800 step4_grab.lammpstrj id type x y z vx vy vz

thermo 500
run 18400

write_restart step_4_grab.init.restart
