units metal
atom_style molecular
boundary s s s    #non-periodic

# System definition
read_restart step_8_insert2.init.restart

# set groups
group free type 1 2
group pinanchor type  3 4
group posy type  5 6
group center type  7 8
group base type 9 10


# Pair Coefficients
pair_style	airebo 3.0 1 0
pair_coeff * * CH.airebo C H C H C H C H C H

#####Just run for a bit and let things ring out some

#freeze the jig atoms atoms
fix anchorfix pinanchor setforce 0.0 0.0 0.0 #first is ID = user-assigned name for the fix,  ID of the group of atoms
velocity pinanchor set 0.0 0.0 0.0

fix anchorcenter center setforce 0.0 0.0 0.0 #first is ID = user-assigned name for the fix,  ID of the group of atoms
velocity center set 0.0 0.0 0.0

#fix basefix base setforce 0.0 0.0 0.0 #first is ID = user-assigned name for the fix,  ID of the group of atoms
#velocity base set 0.0 0.0 0.0

# Equilibrate to 90K
fix nve all nve
timestep 0.00025
fix freefix free temp/berendsen 90. 90. 0.25

#VMD IMD connection. The VMd command is imd conenct localhost 5678
fix comm all imd 5678 unwrap off fscale 100.0 trate 10 nowait off


fix posy_up posy move linear 0.0 0.20 0.00

dump relax_dmp all custom 1500 step9_relax.lammpstrj id type x y z vx vy vz
thermo 500
run 50000


write_restart step_9_relax.init.restart
